*HEADING
** Job name: UT_clement Model name: Model-1
** Generated by: Abaqus/CAE 2023
*PREPRINT, echo=NO, model=NO, history=NO, contact=NO
**
** PARTS
**
*PART, name=Part-1
*Node
      1,          -5.,           0.,           5.
      2,          -5.,           5.,           5.
      3,          -5.,           0.,           0.
      4,          -5.,           5.,           0.
      5,           0.,           0.,           5.
      6,           0.,           5.,           5.
      7,           0.,           0.,           0.
      8,           0.,           5.,           0.
*Element, type=C3D8R
1, 5, 6, 8, 7, 1, 2, 4, 3
*Nset, nset=XMIN, generate
 1,  4,  1
*Elset, elset=XMIN
 1,
*Nset, nset=XLOAD, generate
 5,  8,  1
*Elset, elset=XLOAD
 1,
*Nset, nset=YMIN, generate
 1,  7,  2
*Elset, elset=YMIN
 1,
*Nset, nset=ZMIN
 3, 4, 7, 8
*Elset, elset=ZMIN
 1,
*Elset, elset=ELALL
 1,
** 0deg axis aligned with y-direction
*ORIENTATION, name=Ori-00
         0.,     1.,     0.,	-1.,     0.,     0.
3, 0.
*ORIENTATION, name=Ori-15
         0.267949192431,     1.,     0.,	-1.,     0.267949192431,     0.
3, 0.
*ORIENTATION, name=Ori-30
         0.577350269193,     1.,     0.,	-1.,     0.577350269193,     0.
3, 0.
*ORIENTATION, name=Ori-45
         1.,     1.,     0.,	-1.,     1.,     0.
3, 0.
*ORIENTATION, name=Ori-60
         1.,     0.577350269193,     0.,	-0.577350269193,     1.,     0.
3, 0.
*ORIENTATION, name=Ori-75
         1.,     0.267949192431,     0.,	-0.267949192431,     1.,     0.
3, 0.
** 90deg axis aligned with y-direction
*ORIENTATION, name=Ori-90
         1.,     0.,     0.,	0.,     1.,     0.
3, 0.
** Section: Section-1
*SOLID SECTION, elset=ELALL, CONTROLS=SOLID_CONTROLS, orientation=Ori-90, material=mat
**
*End Part
*SECTION CONTROLS, NAME=SOLID_CONTROLS, HOURGLASS=ENHANCED, ELEMENT DELETION=YES
1.0, 1.0, 1.0,
**
**
** ASSEMBLY
**
*Assembly, name=Assembly
**
*Instance, name=Part-1-1, part=Part-1
*End Instance
**
*End Assembly
*Amplitude, name=Amp-1
             0.,              0.,              1.,              1.
**
** MATERIALS
**
*Material, name=mat
*INCLUDE, INPUT=DP780_abq_deg4_mises.inp
*DEPVAR
1
** ----------------------------------------------------------------
**
** STEP: Step-1
**
*Step, name=Step-1, nlgeom=YES
*Static
1e-05, 1., 1e-05, 0.005
**
** BOUNDARY CONDITIONS
**
** Name: BC-1 Type: Symmetry/Antisymmetry/Encastre
*Boundary
Part-1-1.XMIN, XSYMM
** Name: BC-2 Type: Symmetry/Antisymmetry/Encastre
*Boundary
Part-1-1.YMIN, YSYMM
** Name: BC-3 Type: Symmetry/Antisymmetry/Encastre
*Boundary
Part-1-1.ZMIN, ZSYMM
** Name: BC-4 Type: Displacement/Rotation
*Boundary
Part-1-1.XLOAD, 1, 1, 3,
**
** OUTPUT REQUESTS
**
*OUTPUT, FIELD, FREQUENCY=1
*ELEMENT OUTPUT
 S, SDV, TRIAX,
*NODE OUTPUT
 U, RF
**
*OUTPUT, HISTORY, FREQUENCY=1
*NODE OUTPUT, NSET=Part-1-1.XLOAD
 U2, RF2
*NODEOUTPUT, NSET=Part-1-1.XMIN
 U2, RF2
*ELEMENT OUTPUT, ELSET=Part-1-1.ELALL
 TRIAX, SDV, S

*End Step
