*Heading
** Job name: UT_shell Model name: Model-1
** Generated by: Abaqus/CAE 2023
*Preprint, echo=NO, model=NO, history=NO, contact=NO
**
** PARTS
**
*Part, name=Part-1
*Node
      1,           0.,          20.,           0.
      2,         -20.,          20.,           0.
      3,           0.,           0.,           0.
      4,         -20.,           0.,           0.
*Element, type=S4R
1, 1, 2, 4, 3
*Nset, nset=ELALL, generate
 1,  4,  1
*Elset, elset=ELALL
 1,
*Nset, nset=XMIN
 2, 4
*Elset, elset=XMIN
 1,
*Nset, nset=YMIN
 3, 4
*Elset, elset=YMIN
 1,
*Nset, nset=YMAX
 1, 2
*Elset, elset=YMAX
 1,
*Nset, nset=XMAX
 1, 3
*Elset, elset=XMAX
 1,
*ORIENTATION, name=Ori-00
         0.,     1.,     0.,	-1.,     0.,     0.
3, 0.
** Section: Section-1
*Shell Section, elset=ELALL, material=mat
10., 5
*TRANSVERSE SHEAR STIFFNESS
1.0, 1.0, 0.0,
*End Part
**
**
** ASSEMBLY
**
*Assembly, name=Assembly
**
*Instance, name=Part-1-1, part=Part-1
*End Instance
**
*Nset, nset=Set-1, instance=Part-1-1
 3, 4
*Elset, elset=Set-1, instance=Part-1-1
 1,
*Nset, nset=Set-2, instance=Part-1-1
 1, 2
*Elset, elset=Set-2, instance=Part-1-1
 1,
*Nset, nset=Set-3, instance=Part-1-1
 1, 2
*Elset, elset=Set-3, instance=Part-1-1
 1,
*End Assembly
*Amplitude, name=Amp-1
             0.,              0.,              1.,              0.1
**
** MATERIALS
**
*Material, name=mat
*INCLUDE, INPUT=mat.inp
*DEPVAR
1,
**
** BOUNDARY CONDITIONS
**
** Name: BC-1 Type: Symmetry/Antisymmetry/Encastre
*Boundary
Set-1, YSYMM
** ----------------------------------------------------------------
**
** STEP: Step-1
**
*Step, name=Step-1, nlgeom=NO
*Static
0.01, 1., 1e-05, 1.
**
** BOUNDARY CONDITIONS
**
** Name: BC-2 Type: Displacement/Rotation
*Boundary, amplitude=Amp-1
Set-3, 2, 2, 1.
**
** OUTPUT REQUESTS
**
*Restart, write, frequency=0
**
** FIELD OUTPUT: F-Output-1
**
*Output, field, variable=PRESELECT
**
** HISTORY OUTPUT: H-Output-1
**
*Output, history, variable=PRESELECT
*End Step
