*Heading
** Job name: UT_shell2 Model name: Model-1
** Generated by: Abaqus/CAE 2023
*Preprint, echo=NO, model=NO, history=NO, contact=NO
**
** PARTS
**
*Part, name=Part-1
*ORIENTATION, name=Ori-00
         0.,     1.,     0.,	-1.,     0.,     0.
3, 0.
*Node
      1,           0.,          20.
      2,         -20.,          20.
      3,           0.,           0.
      4,         -20.,           0.
*Element, type=CPS4R
1, 1, 2, 4, 3
*Nset, nset=XMIN
 2, 4
*Elset, elset=XMIN
 1,
*Nset, nset=YMIN
 3, 4
*Elset, elset=YMIN
 1,
*Nset, nset=YMAX
 1, 2
*Elset, elset=YMAX
 1,
*Nset, nset=XMAX
 1, 3
*Elset, elset=XMAX
 1,
*Elset, elset=ELALL
 1,
** Section: Section-1
*SOLID SECTION, elset=ELALL, ORIENTATION=Ori-00, material=mat
*HOURGLASS STIFFNESS
1,
*End Part
*Assembly, name=Assembly
**
*Instance, name=Part-1-1, part=Part-1
*End Instance
**
*End Assembly
**
*Amplitude, name=Amp-1
             0.,              0.,              1.,              0.1.
**
** MATERIALS
**
*Material, name=mat
*INCLUDE, input=mat.inp
*DEPVAR
1,
**
** BOUNDARY CONDITIONS
**
** Name: BC-1 Type: Symmetry/Antisymmetry/Encastre
*Boundary
Part-1-1.YMIN, YSYMM
** ----------------------------------------------------------------
**
** STEP: Step-1
**
*Step, name=Step-1, nlgeom=NO
*Static
0.1, 1., 1e-2, 1.
**
** BOUNDARY CONDITIONS
**
** Name: BC-2 Type: Displacement/Rotation
*Boundary, amplitude=Amp-1
Part-1-1.YMAX, 2, 2, 1.,
**
** OUTPUT REQUESTS
**
*Restart, write, frequency=1
**
** FIELD OUTPUT: F-Output-1
**
*Output, field, variable=PRESELECT
**
** HISTORY OUTPUT: H-Output-1
**
*Output, history, variable=PRESELECT
*End Step
