*Heading
** Job name: SS_polyN_oneel Model name: Model-1
** Generated by: Abaqus/CAE 2023
*Preprint, echo=NO, model=NO, history=NO, contact=NO
**
** PARTS
**
*Part, name=Part-1
*Node
      1,          20.,          20.,           0.
      2,         -20.,          20.,           0.
      3,          20.,         -20.,           0.
      4,         -20.,         -20.,           0.
*Element, type=S4R
1, 1, 2, 4, 3
*Nset, nset=ELALL, generate
 1,  4,  1
*Elset, elset=ELALL
 1,
*Nset, nset=ORIGIN
 4,
*Nset, nset=PINNED
 2,
*Nset, nset=LOAD
 3,
** Section: Section-1
*Shell Section, elset=ELALL, material=Material-1
2., 5
*Transverse Shear Stiffness
21833.3, 21833.3, 0.
*End Part
**
**
** ASSEMBLY
**
*Assembly, name=Assembly
**
*Instance, name=Part-1-1, part=Part-1
*End Instance
**
*End Assembly
*Amplitude, name=Amp-1
             0.,              0.,              1.,              1.
**
** MATERIALS
**
*Material, name=Material-1
*Depvar
      1,
*User Material, constants=595
70000.,     0.33,     436.,     222.,     6.75,      12.,      49.,       1.
 -5.33333,  22.4857, -68.6194,  143.539,  -211.55,  272.293, -307.105,  250.857
 -131.345,    41.29, -7.31162,  1.73764,  12.9732, -51.8199,  190.928,   -444.9
  770.329, -594.315,   108.68,  104.851,  72.0018,  -112.26,  33.4819,  233.571
 -1054.01,  3302.43, -6326.67,  8860.24, -7372.22,  3641.44, -523.874,  139.544
 -143.622,  469.656, -1015.79,  2863.13, -1025.15,  -797.43,  537.618,  2086.03
   -4745.,  6732.73,  -3582.8,  1717.64,  819.889, -619.245,  896.105,  431.972
      12., -58.6667,  224.857, -617.574,  1148.31, -1480.85,  1633.76, -1535.52
  1003.43, -394.034,    82.58, -7.31162,       0.,  129.732, -466.379,  1527.43
  -3114.3,  4621.98, -2971.57,  434.719,  314.553,  144.004,  -112.26,       0.
  1868.57, -7378.08,  19814.6, -31633.4,   35441., -22116.7,  7282.87, -523.874
       0., -861.734,  2348.28, -4063.15,   8589.4,  -2050.3,  -797.43,       0.
  8344.12,  -14235.,  13465.5,  -3582.8,       0.,  1639.78, -619.245,       0.
       0., -5.33333,  44.9713, -205.858,  574.156, -1057.75,  1633.76, -2149.73
  2006.85,  -1182.1,    412.9, -80.4279,  20.8517,       0., -51.8199,  381.856
  -1334.7,  3081.32, -2971.57,  652.078,  733.956,  576.015, -1010.34,  334.819
       0., -1054.01,  6604.86,  -18980.,   35441., -36861.1,  21848.6, -3667.12
  1116.35,       0.,  469.656, -2031.58,   8589.4,  -4100.6, -3987.15,  3225.71
       0.,   -4745.,  13465.5, -10748.4,  6870.54,       0., -619.245,  1792.21
       0.,       0.,     132., -586.667,  2023.71, -4940.59,  8038.19, -8885.11
  8168.79,  -6142.1,  3010.28, -788.067,    82.58,       0.,       0.,  1167.59
 -3731.03,   10692., -18685.8,  23109.9, -11886.3,  1304.16,  629.105,  144.004
       0.,       0.,   13080., -44268.5,  99072.9, -126533.,  106323., -44233.3
  7282.87,       0.,       0., -4308.67,  9393.12, -12189.5,  17178.8,  -2050.3
       0.,       0.,  25032.4,  -28470.,  13465.5,       0.,       0.,  1639.78
       0.,       0.,       0.,  44.9713, -411.716,  1722.47, -4231.01,  8168.79
 -12898.4,   14048., -9456.81,   3716.1, -804.279,  229.368,       0.,       0.
  381.856,  -2669.4,  9243.95, -11886.3,  3260.39,  4403.74,   4032.1, -8082.72
  3013.37,       0.,       0.,  6604.86,  -37960.,  106323., -147444.,  109243.
 -22002.7,  7814.47,       0.,       0., -2031.58,  17178.8, -12301.8, -15948.6
  16128.5,       0.,       0.,  13465.5, -21496.8,  20611.6,       0.,       0.
  1792.21,       0.,       0.,       0., -58.6667,  449.713, -1852.72,  4593.25
 -7404.26,  9802.55, -10748.7,  8027.42,  -3546.3,    825.8, -80.4279,       0.
       0., -466.379,  3054.85, -9342.89,  18487.9, -14857.9,  2608.31,  2201.87
  1152.03, -1010.34,       0.,       0., -7378.08,  39629.2, -94900.1,  141764.
 -110583.,  43697.2, -3667.12,       0.,       0.,  2348.28, -8126.31,  25768.2
 -8201.21, -3987.15,       0.,       0.,  -14235.,  26930.9, -10748.4,       0.
       0., -619.245,       0.,       0.,       0.,  1.73764, -7.31162,    41.29
 -131.345,  250.857, -307.105,  272.293,  -211.55,  143.539, -68.6194,  22.4857
 -5.33333,       1.,  33.4819,  -112.26,  72.0018,  104.851,   108.68, -594.315
  770.329,   -444.9,  190.928, -51.8199,  12.9732,  139.544, -523.874,  3641.44
 -7372.22,  8860.24, -6326.67,  3302.43, -1054.01,  233.571,  537.618,  -797.43
 -1025.15,  2863.13, -1015.79,  469.656, -143.622,  1717.64,  -3582.8,  6732.73
   -4745.,  2086.03,  896.105, -619.245,  819.889,  431.972, -7.31162,    82.58
 -394.034,  1003.43, -1535.52,  1633.76, -1480.85,  1148.31, -617.574,  224.857
 -58.6667,      12.,       0.,  -112.26,  144.004,  314.553,  434.719, -2971.57
  4621.98,  -3114.3,  1527.43, -466.379,  129.732,       0., -523.874,  7282.87
 -22116.7,   35441., -31633.4,  19814.6, -7378.08,  1868.57,       0.,  -797.43
  -2050.3,   8589.4, -4063.15,  2348.28, -861.734,       0.,  -3582.8,  13465.5
  -14235.,  8344.12,       0., -619.245,  1639.78,       0.,       0.,  20.8517
 -80.4279,    412.9,  -1182.1,  2006.85, -2149.73,  1633.76, -1057.75,  574.156
 -205.858,  44.9713, -5.33333,       0.,  334.819, -1010.34,  576.015,  733.956
  652.078, -2971.57,  3081.32,  -1334.7,  381.856, -51.8199,       0.,  1116.35
 -3667.12,  21848.6, -36861.1,   35441.,  -18980.,  6604.86, -1054.01,       0.
  3225.71, -3987.15,  -4100.6,   8589.4, -2031.58,  469.656,       0.,  6870.54
 -10748.4,  13465.5,   -4745.,       0.,  1792.21, -619.245,       0.,       0.
    82.58, -788.067,  3010.28,  -6142.1,  8168.79, -8885.11,  8038.19, -4940.59
  2023.71, -586.667,     132.,       0.,       0.,  144.004,  629.105,  1304.16
 -11886.3,  23109.9, -18685.8,   10692., -3731.03,  1167.59,       0.,       0.
  7282.87, -44233.3,  106323., -126533.,  99072.9, -44268.5,   13080.,       0.
       0.,  -2050.3,  17178.8, -12189.5,  9393.12, -4308.67,       0.,       0.
  13465.5,  -28470.,  25032.4,       0.,       0.,  1639.78,       0.,       0.
       0.,  229.368, -804.279,   3716.1, -9456.81,   14048., -12898.4,  8168.79
 -4231.01,  1722.47, -411.716,  44.9713,       0.,       0.,  3013.37, -8082.72
   4032.1,  4403.74,  3260.39, -11886.3,  9243.95,  -2669.4,  381.856,       0.
       0.,  7814.47, -22002.7,  109243., -147444.,  106323.,  -37960.,  6604.86
       0.,       0.,  16128.5, -15948.6, -12301.8,  17178.8, -2031.58,       0.
       0.,  20611.6, -21496.8,  13465.5,       0.,       0.,  1792.21,       0.
       0.,       0., -80.4279,    825.8,  -3546.3,  8027.42, -10748.7,  9802.55
 -7404.26,  4593.25, -1852.72,  449.713, -58.6667,       0.,       0., -1010.34
  1152.03,  2201.87,  2608.31, -14857.9,  18487.9, -9342.89,  3054.85, -466.379
       0.,       0., -3667.12,  43697.2, -110583.,  141764., -94900.1,  39629.2
 -7378.08,       0.,       0., -3987.15, -8201.21,  25768.2, -8126.31,  2348.28
       0.,       0., -10748.4,  26930.9,  -14235.,       0.,       0., -619.245
       0.,       0.,       0.
** ----------------------------------------------------------------
**
** STEP: Step-1
**
*Step, name=Step-1, nlgeom=NO
*Static
0.1, 1., 1e-05, 0.2
**
** BOUNDARY CONDITIONS
**
** Name: BC-1 Type: Displacement/Rotation
*Boundary
Part-1-1.ORIGIN, 1, 1
Part-1-1.ORIGIN, 2, 2
Part-1-1.ORIGIN, 3, 3
** Name: BC-2 Type: Displacement/Rotation
*Boundary
Part-1-1.PINNED, 1, 1
Part-1-1.PINNED, 2, 2
Part-1-1.PINNED, 3, 3
** Name: BC-3 Type: Displacement/Rotation
*Boundary, amplitude=Amp-1
Part-1-1.LOAD, 2, 2, 5.
**
** OUTPUT REQUESTS
**
*Restart, write, frequency=0
**
** FIELD OUTPUT: F-Output-1
**
*Output, field
*Node Output
U,
*Element Output, directions=YES
LE, S, SDV
*Output, history, frequency=0
*End Step
