** Definition of Parameters of Analysis
** UT Single Element EXP
**---------------------------------------------------
*PARAMETER
THICKNESS	= 1.
WIDTH		= 1.
**
DISPL		= 0.1
DTIME		= 1.0
**
DT		    = DTIME/2.E5
**---------------------------------------------------
** Geometry and Orientation
**---------------------------------------------------
*INCLUDE, INPUT=UT.geo
*NMAP, TYPE=RECTANGULAR, NSET=NALL
0., 0., 0., 1., 0., 0.,
0., 1., 0.,
** Width & Thickness factor
<WIDTH>,1., <THICKNESS>
** 0deg axis aligned with y-direction
*ORIENTATION, name=Ori-00
         0.,     1.,     0.,	-1.,     0.,     0.
3, 0.
*ORIENTATION, name=Ori-15
         0.267949192431,     1.,     0.,	-1.,     0.267949192431,     0.
3, 0.
*ORIENTATION, name=Ori-30
         0.577350269193,     1.,     0.,	-1.,     0.577350269193,     0.
3, 0.
*ORIENTATION, name=Ori-45
         1.,     1.,     0.,	-1.,     1.,     0.
3, 0.
*ORIENTATION, name=Ori-60
         1.,     0.577350269193,     0.,	-0.577350269193,     1.,     0.
3, 0.
*ORIENTATION, name=Ori-75
         1.,     0.267949192431,     0.,	-0.267949192431,     1.,     0.
3, 0.
** 90deg axis aligned with y-direction
*ORIENTATION, name=Ori-90
         1.,     0.,     0.,	0.,     1.,     0.
3, 0.
**-----------------------------------------------------
** Material Data
**-----------------------------------------------------
*SECTION CONTROLS, NAME=SOLID_CONTROLS, HOURGLASS=RELAX STIFFNESS, ELEMENT DELETION=YES
1.0, 1.0, 1.0, 1.0, 1.0, , ,
*SOLID SECTION, elset=ELALL, CONTROLS=SOLID_CONTROLS, orientation=Ori-00, material=mat
**
*MATERIAL,NAME=mat
*INCLUDE, INPUT=material.dat
**
**
*DEPVAR, DELETE=7
19
1,EQPS,"Equivalent Plastic Strain"
2,Seq,"Equivalent stress"
3,Svm,"Equivalent VM stress"
4,TRIAX,"Triaxiality"
5,LODE,"Lode parameter"
6,D,"Damage"
7,FAIL,"Failure switch"
8,EQS,"Equivalent strain"
9,EQPSDot,"Equivalent Plastic Strain Rate"
10,T,"Temperature"
11,CHECK,"CHECK"
12,ySRH,"Strain rate hardening"
13,yTS,"Thermal softening"
14,fSR,"Failure strain rate"
15,fTS,"Failure thermal softening"
16,Wcl,"CL plastic work"
17,EQPSf,"Equivalent Plastic Strain to Failure"
18,ITER,"Iterations"
19,RES,"Residual"
**------------------------------------------------------
** BOUNDARY CONDITIONS
**------------------------------------------------------
*EQUATION
2
YMAX, 2, 1.
LOAD, 2, -1.
2
YMIN, 2, 1.
BASE, 2, -1.
**
*BOUNDARY
XMIN, 1, 1, 0.
XMIN, 5, 6, 0.
YMIN, 2, 2, 0.
BASE, 2, 2, 0.
YMIN, 4, 4, 0.
ZMIN, 3, 5, 0.
**
*AMPLITUDE, NAME=ccr, DEFINITION=TABULAR, SMOOTH=0.05
0.,0.,
**<TRAMP1>, <RAMP1>,
<DTIME>, <DISPL>,
** ----------------------------------------------------
*STEP, name=Step-1
*DYNAMIC, EXPLICIT
, <DTIME>, ,
*FIXED MASS SCALING, TYPE=UNIFORM, DT=<DT>
*Bulk Viscosity
0.06, 1.2
**
*BOUNDARY, TYPE=DISPLACEMENT, AMPLITUDE=ccr
LOAD, 2, 2, 1.
**-----------------------------------
** OUTPUT REQUESTS
**------------------------------------------------------
*OUTPUT, FIELD, FREQUENCY=1
*ELEMENT OUTPUT
 S, LEP, SDV, TRIAX, SP, MISES
*NODE OUTPUT
 U, V, RF
**
*OUTPUT, HISTORY, FREQUENCY=99
*NODE OUTPUT, NSET=LOAD
 U2, RF2
*NODE OUTPUT, NSET=BASE
 U2, RF2
*ELEMENT OUTPUT, ELSET=ONSET
 TRIAX, SDV, LEP, SP, S, MISES
**------------------------------------------------------
*End Step
